*Heading
 Torque and Face
** Job name: Job-1 Model name: Model-1
** Generated by: Abaqus/CAE 2018
*Preprint, echo=NO, model=NO, history=NO, contact=NO
**
** PARTS
**
*Part, name=polemount_2Jeremiah-1
*Node
      1,  -1.57480311,           0.,   5.31496048
      2,   1.57480311,           0.,   5.31496048
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*Element, type=C3D10
    1,  1735,  1736,  1737,  1738,  2962,  2961,  2960,  2964,  2963,  2965
    2,  1735,  1739,  1740,  1741,  2968,  2967,  2966,  2970,  2969,  2971
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*Nset, nset=Set-1, generate
     1,  20135,      1
*Elset, elset=Set-1, generate
     1,  12474,      1
** Section: Section-1
*Solid Section, elset=Set-1, material=SS316
,
*End Part
**
**
** ASSEMBLY
**
*Assembly, name=Assembly
**
*Instance, name=polemount_2Jeremiah-1-1, part=polemount_2Jeremiah-1
*End Instance
**
*Nset, nset=Set-1, instance=polemount_2Jeremiah-1-1
    12,    13,    14,    15,    30,    31
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*Elset, elset=Set-1, instance=polemount_2Jeremiah-1-1
  1309,  2331,  2378,  2976,  3090,  3115
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*Nset, nset=Set-2, instance=polemount_2Jeremiah-1-1
    12,    13,    14,    15,    30,    31
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*Elset, elset=Set-2, instance=polemount_2Jeremiah-1-1
  1309,  2331,  2378,  2509,  2976,  3090
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*Elset, elset=_Surf-1_S3, internal, instance=polemount_2Jeremiah-1-1
   430,   661,   719,   746,   809,   862
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*Elset, elset=_Surf-1_S1, internal, instance=polemount_2Jeremiah-1-1
  1091,  1324,  1506,  1719,  2603,  9936
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*Elset, elset=_Surf-1_S2, internal, instance=polemount_2Jeremiah-1-1
  1781,  1923,  1961,  2044,  3239,  3668, 10213, 10310, 10620, 10681, 10775, 11456
*Elset, elset=_Surf-1_S4, internal, instance=polemount_2Jeremiah-1-1
  2156,  2940,  7922, 10078, 10266, 10271, 10318, 10588, 10870, 11116, 11137, 11173, 12410
*Surface, type=ELEMENT, name=Surf-1
_Surf-1_S3, S3
_Surf-1_S1, S1
_Surf-1_S2, S2
_Surf-1_S4, S4
*Elset, elset=_Surf-2_S2, internal, instance=polemount_2Jeremiah-1-1
   157,  2438,  2603,  5684,  5780,  8026,  8496, 10058, 10168, 10296, 10423, 10621
*Elset, elset=_Surf-2_S3, internal, instance=polemount_2Jeremiah-1-1
   659,   792,   972,  1408,  1719,  2434
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*Elset, elset=_Surf-2_S1, internal, instance=polemount_2Jeremiah-1-1
  1863,  7115,  9043,  9224, 10237, 10266, 10430, 10620, 10932
*Elset, elset=_Surf-2_S4, internal, instance=polemount_2Jeremiah-1-1
  7255, 10100, 10261, 10298, 10403, 10432, 10571
*Surface, type=ELEMENT, name=Surf-2
_Surf-2_S2, S2
_Surf-2_S3, S3
_Surf-2_S4, S4
_Surf-2_S1, S1
*Elset, elset=_Surf-3_S2, internal, instance=polemount_2Jeremiah-1-1
   157,  2438,  2603,  5684,  5780,  8026,  8496, 10058, 10168, 10296, 10423, 10621
*Elset, elset=_Surf-3_S3, internal, instance=polemount_2Jeremiah-1-1
   659,   792,   972,  1408,  1719,  2434
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*Elset, elset=_Surf-3_S1, internal, instance=polemount_2Jeremiah-1-1
  1863,  7115,  9043,  9224, 10237, 10266, 10430, 10620, 10932
*Elset, elset=_Surf-3_S4, internal, instance=polemount_2Jeremiah-1-1
  7255, 10100, 10261, 10298, 10403, 10432, 10571
*Surface, type=ELEMENT, name=Surf-3
_Surf-3_S2, S2
_Surf-3_S3, S3
_Surf-3_S4, S4
_Surf-3_S1, S1
*Orientation, name=TorqueAxis, system=CYLINDRICAL
3.74015748031496, 1.46011205901731e-08, 3.93700785644295, 4.74015748031496, 1.46011205901731e-08, 3.93700785644295
1, 0.
*End Assembly
**
** MATERIALS
**
*Material, name=SS316
*Density
7870.,
*Elastic
 1.9e+08, 0.265
**
** BOUNDARY CONDITIONS
**
** Name: BC-1 Type: Displacement/Rotation
*Boundary
Set-2, 1, 1
Set-2, 2, 2
Set-2, 3, 3
Set-2, 4, 4
Set-2, 5, 5
Set-2, 6, 6
** ----------------------------------------------------------------
**
** STEP: Step-1
**
*Step, name=Step-1, nlgeom=NO
TorqueFaceLoading
*Static
1., 1., 1e-05, 1.
**
** LOADS
**
** Name: FaceLoad   Type: Pressure
*Dsload
Surf-1, P, 501.169
** Name: TorqueLoad   Type: Surface traction
*Dsload, orientation=TorqueAxis
Surf-3, TRSHR, 6000., 0., -0.707107, 0.707107
**
** OUTPUT REQUESTS
**
*Restart, write, frequency=0
**
** FIELD OUTPUT: F-Output-1
**
*Output, field, variable=PRESELECT
**
** HISTORY OUTPUT: H-Output-1
**
*Output, history, variable=PRESELECT
*End Step
